*Heading
** Job name: 40S Model name: 40
** Generated by: Abaqus/CAE 2018
*Preprint, echo=NO, model=NO, history=NO, contact=NO
**
** PARTS
**
*Part, name=P40
*End Part
**
**
** ASSEMBLY
**
*Assembly, name=Assembly
**
*Instance, name=P40-1, part=P40
*Node
      1,         250.,         250.,          50.
      2,         210.,         250.,         100.
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*Element, type=C3D8R
  1,  592,  593, 3454, 3239,   16,   17,  360,  359
  2,  593,   25,  382, 3454,   17,    1,   18,  360
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*Nset, nset=Set-1, generate
    1,  8448,     1
*Elset, elset=Set-1, generate
    1,  6882,     1
** Section: Section-1
*Solid Section, elset=Set-1, material=Material-1
,
*End Instance
**
*Nset, nset=Set-1, instance=P40-1
    1,    2,    3,    4,    5,    6
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*Elset, elset=Set-1, instance=P40-1
    1,    2,    3,    4,    5,    6
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*Nset, nset=Set-2, instance=P40-1
    7,    8,   11,   12,  147,  148
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*Elset, elset=Set-2, instance=P40-1
 1368, 1372, 1376, 1380, 1384, 1388
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*Elset, elset=_Surf-1_S4, internal, instance=P40-1
 124, 128, 132, 136, 140, 144
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*Elset, elset=_Surf-1_S3, internal, instance=P40-1
 241, 242, 243, 244, 257, 258
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*Elset, elset=_Surf-1_S2, internal, instance=P40-1, generate
 737,  800,    1
*Surface, type=ELEMENT, name=Surf-1
_Surf-1_S4, S4
_Surf-1_S3, S3
_Surf-1_S2, S2
*Elset, elset=_Surf-2_S4, internal, instance=P40-1
 124, 128, 132, 136, 140, 144
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*Elset, elset=_Surf-2_S3, internal, instance=P40-1
 241, 242, 243, 244, 257, 258
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*Elset, elset=_Surf-2_S2, internal, instance=P40-1, generate
 737,  800,    1
*Surface, type=ELEMENT, name=Surf-2
_Surf-2_S4, S4
_Surf-2_S3, S3
_Surf-2_S2, S2
*Elset, elset=_Surf-3_S4, internal, instance=P40-1
 124, 128, 132, 136, 140, 144
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*Elset, elset=_Surf-3_S3, internal, instance=P40-1
 241, 242, 243, 244, 257, 258
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*Elset, elset=_Surf-3_S2, internal, instance=P40-1, generate
 737,  800,    1
*Surface, type=ELEMENT, name=Surf-3
_Surf-3_S4, S4
_Surf-3_S3, S3
_Surf-3_S2, S2
*End Assembly
*Amplitude, name=Amp-1
            0.1,           514.8,             0.2,          1029.6,             0.3,          1544.4,             0.4,          2059.2
            0.5,           2574.,             0.6,          3088.8,             0.7,          3603.6,             0.8,          4118.4
            0.9,          4633.2,              1.,           5148.
**
** MATERIALS
**
*Material, name=Material-1
*Elastic
 31622.8, 0.2
** ----------------------------------------------------------------
**
** STEP: Step-1
**
*Step, name=Step-1, nlgeom=YES
*Static
0.1, 1., 1e-05, 1.
**
** BOUNDARY CONDITIONS
**
** Name: BC-1 Type: Symmetry/Antisymmetry/Encastre
*Boundary
Set-1, ZASYMM
** Name: BC-2 Type: Symmetry/Antisymmetry/Encastre
*Boundary
Set-2, ENCASTRE
**
** LOADS
**
** Name: Load-1   Type: Pressure
*Dsload
Surf-3, P, 0.8
**
** OUTPUT REQUESTS
**
*Restart, write, frequency=0
**
** FIELD OUTPUT: F-Output-2
**
*Output, field
*Node Output
U,
*Element Output, directions=YES
E, S
**
** FIELD OUTPUT: F-Output-1
**
*Output, field, variable=PRESELECT
**
** HISTORY OUTPUT: H-Output-1
**
*Output, history, variable=PRESELECT
*End Step
