*Heading
** Job name: Job-10 Model name: Model-1
** Generated by: Abaqus/CAE 2018
*Preprint, echo=NO, model=NO, history=NO, contact=NO
**
** PARTS
**
*Part, name=Part-1
*End Part
**
*Part, name=Part-2
*End Part
**
**
** ASSEMBLY
**
*Assembly, name=Assembly
**
*Instance, name=Part-1-1, part=Part-1
         8.8,         3.75,           0.
*Node
      1,           0.,           0.,           5.
      2,           0.,         0.75,           5.
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*Element, type=C3D8R
  1,   94,  647, 1913,  485,    1,   33,  449,   54
  2,  647,  648, 1914, 1913,   33,   34,  450,  449
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*Nset, nset=Set-1, generate
    1,  2992,     1
*Elset, elset=Set-1, generate
    1,  2040,     1
** Section: Section-1
*Solid Section, elset=Set-1, material=Material-1
,
*End Instance
**
*Instance, name=Part-2-1, part=Part-2
         8.8,           0.,           0.
*Node
      1,           3.,           0.,           5.
      2,           5.,           0.,           5.
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*Element, type=C3D8R
  1,   97,  663, 2409,  537,    1,   37,  481,   58
  2,  663,  664, 2410, 2409,   37,   38,  482,  481
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*Nset, nset=Set-1, generate
    1,  5308,     1
*Elset, elset=Set-1, generate
    1,  4385,     1
** Section: Section-2
*Solid Section, elset=Set-1, material=Material-2
,
*End Instance
**
*Nset, nset=Set-20, instance=Part-2-1
    1,    2,    3,    4,   11,   14
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*Elset, elset=Set-20, instance=Part-2-1
    1,    2,    3,    4,    5,    6
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*Nset, nset=Set-21, instance=Part-1-1
    1,    2,    5,    6,    7,    8
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*Nset, nset=Set-21, instance=Part-2-1
    3,    4,    6,    7,   11,   12
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*Elset, elset=Set-21, instance=Part-1-1
    1,    2,    3,   31,   32,   33
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*Elset, elset=Set-21, instance=Part-2-1
   36,   37,   38,   39,   40,   76
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*Elset, elset=_Surf-27_S4, internal, instance=Part-2-1, generate
 1049,  1265,     9
*Surface, type=ELEMENT, name=Surf-27
_Surf-27_S4, S4
*Elset, elset=_m_Surf-23_S4, internal, instance=Part-2-1
  410,  420,  430,  440,  450,  460
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*Elset, elset=_m_Surf-23_S3, internal, instance=Part-2-1
 2306, 2307, 2308, 2309, 2310, 2356
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*Elset, elset=_m_Surf-23_S2, internal, instance=Part-2-1, generate
 1666,  1729,     1
*Elset, elset=_m_Surf-23_S1, internal, instance=Part-2-1, generate
 361,  400,    1
*Surface, type=ELEMENT, name=m_Surf-23
_m_Surf-23_S4, S4
_m_Surf-23_S3, S3
_m_Surf-23_S2, S2
_m_Surf-23_S1, S1
*Elset, elset=_m_Surf-25_S4, internal, instance=Part-2-1
  410,  420,  430,  440,  450,  460
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*Elset, elset=_m_Surf-25_S3, internal, instance=Part-2-1
 2306, 2307, 2308, 2309, 2310, 2356
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*Elset, elset=_m_Surf-25_S2, internal, instance=Part-2-1, generate
 1666,  1729,     1
*Elset, elset=_m_Surf-25_S1, internal, instance=Part-2-1, generate
 361,  400,    1
*Surface, type=ELEMENT, name=m_Surf-25
_m_Surf-25_S4, S4
_m_Surf-25_S3, S3
_m_Surf-25_S2, S2
_m_Surf-25_S1, S1
*Elset, elset=_s_Surf-23_S4, internal, instance=Part-1-1
  513,  516,  519,  522,  525,  528
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*Elset, elset=_s_Surf-23_S6, internal, instance=Part-1-1
    1,    4,    7,   10,   13,   16
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*Elset, elset=_s_Surf-23_S3, internal, instance=Part-1-1
 1021, 1022, 1023, 1024, 1025, 1026
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*Surface, type=ELEMENT, name=s_Surf-23
_s_Surf-23_S4, S4
_s_Surf-23_S6, S6
_s_Surf-23_S3, S3
*Elset, elset=_s_Surf-25_S4, internal, instance=Part-1-1
  513,  516,  519,  522,  525,  528
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*Elset, elset=_s_Surf-25_S6, internal, instance=Part-1-1
    1,    4,    7,   10,   13,   16
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*Elset, elset=_s_Surf-25_S3, internal, instance=Part-1-1
 1021, 1022, 1023, 1024, 1025, 1026
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*Surface, type=ELEMENT, name=s_Surf-25
_s_Surf-25_S4, S4
_s_Surf-25_S6, S6
_s_Surf-25_S3, S3
** Constraint: Constraint-1
*Tie, name=Constraint-1, adjust=yes
s_Surf-25, m_Surf-25
*End Assembly
**
** MATERIALS
**
*Material, name=Material-1
*Density
2000.,
*Elastic
 2e+08, 0.2
*Mohr Coulomb
31., 0.1
*Mohr Coulomb Hardening
2800.,0.
*Material, name=Material-2
*Density
2100.,
*Elastic
 1.5e+10, 0.18
*Mohr Coulomb
 26.5, 0.1
*Mohr Coulomb Hardening
4910.,0.
**
** INTERACTION PROPERTIES
**
*Surface Interaction, name=IntProp-1
1.,
*Friction, slip tolerance=0.005
 0.48,
**
** INTERACTIONS
**
** Interaction: Int-1
*Contact Pair, interaction=IntProp-1, type=SURFACE TO SURFACE
s_Surf-23, m_Surf-23
** ----------------------------------------------------------------
**
** STEP: Step-1
**
*Step, name=Step-1, nlgeom=YES
*Static
0.01, 1., 1e-05, 1.
**
** BOUNDARY CONDITIONS
**
** Name: BC-1 Type: Symmetry/Antisymmetry/Encastre
*Boundary
Set-20, ENCASTRE
** Name: BC-2 Type: Symmetry/Antisymmetry/Encastre
*Boundary
Set-21, YASYMM
**
** LOADS
**
** Name: Load-1   Type: Pressure
*Dsload
Surf-27, P, 214715.
**
** OUTPUT REQUESTS
**
*Restart, write, frequency=0
**
** FIELD OUTPUT: F-Output-1
**
*Output, field
*Node Output
U,
*Element Output, directions=YES
E, S
**
** HISTORY OUTPUT: H-Output-1
**
*Output, history, variable=PRESELECT
*End Step
