*Heading
** Job name: Job-3 Model name: Model-1
** Generated by: Abaqus/CAE 2018
*Preprint, echo=NO, model=NO, history=NO, contact=NO
**
** PARTS
**
*Part, name=P33deg(7793)
*End Part
**
**
** ASSEMBLY
**
*Assembly, name=Assembly
**
*Instance, name=P33deg(7793)-3, part=P33deg(7793)
*Node
      1,         120.,         240.,           0.
      2,         120.,           0.,           0.
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*Element, type=C3D8R
   1,  164,  973, 1843,  869,    1,   13,  271,   84
   2,  973,  974, 1844, 1843,   13,   14,  272,  271
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*Nset, nset=Set-1, generate
    1,  4050,     1
*Elset, elset=Set-1, generate
    1,  3120,     1
** Section: Section-1
*Solid Section, elset=Set-1, material=Material-1
,
*End Instance
**
*Nset, nset=Set-1, instance=P33deg(7793)-3
    1,    2,    3,    4,    5,    6
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*Elset, elset=Set-1, instance=P33deg(7793)-3
    1,   24,   25,   48,   49,   72
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*Nset, nset=Set-2, instance=P33deg(7793)-3
    1,    2,    3,    4,    9,   10
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*Elset, elset=Set-2, instance=P33deg(7793)-3
    1,    2,    3,    4,    5,    6
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*Nset, nset=Set-3, instance=P33deg(7793)-3
    3,    4,    6,    7,   49,   50
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*Elset, elset=Set-3, instance=P33deg(7793)-3
  313,  314,  315,  316,  317,  318
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*Elset, elset=_Surf-2_S5, internal, instance=P33deg(7793)-3
 1777, 1778, 1779, 1780, 1781, 1782
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*Surface, type=ELEMENT, name=Surf-2
_Surf-2_S5, S5
*End Assembly
**
** MATERIALS
**
*Material, name=Material-1
*Elastic
 31622.8, 0.2
** ----------------------------------------------------------------
**
** STEP: Step-1
**
*Step, name=Step-1, nlgeom=NO
*Static
0.01, 1., 1e-05, 1.
**
** BOUNDARY CONDITIONS
**
** Name: BC-1 Type: Symmetry/Antisymmetry/Encastre
*Boundary
Set-1, ZASYMM
** Name: BC-2 Type: Symmetry/Antisymmetry/Encastre
*Boundary
Set-2, ENCASTRE
** Name: BC-3 Type: Symmetry/Antisymmetry/Encastre
*Boundary
Set-3, ENCASTRE
**
** LOADS
**
** Name: Load-1   Type: Pressure
*Dsload
Surf-2, P, 0.56
**
** OUTPUT REQUESTS
**
*Restart, write, frequency=0
**
** FIELD OUTPUT: F-Output-2
**
*Output, field
*Node Output
U, UR, UT, V, VR, VT
*Element Output, directions=YES
ALPHA, ALPHAN, CS11, CTSHR, E, EE, EEQUT, ER, IE, LE, MISES, MISESMAX, MISESONLY, NE, PE, PEEQ
PEEQMAX, PEEQT, PEMAG, PEQC, PRESSONLY, PS, S, SALPHA, SE, SEE, SEP, SEPE, SEQUT, SPE, SSAVG, TE
TEEQ, TEVOL, THE, TRIAX, TSHR, VE, VEEQ, VS
**
** FIELD OUTPUT: F-Output-1
**
*Output, field, variable=PRESELECT
**
** HISTORY OUTPUT: H-Output-1
**
*Output, history, variable=PRESELECT
*End Step
