*Heading
** Job name: Job-4 Model name: Model-1
** Generated by: Abaqus/CAE 2018
*Preprint, echo=NO, model=NO, history=NO, contact=NO
**
** PARTS
**
*Part, name=M1
*End Part
**
**
** ASSEMBLY
**
*Assembly, name=Assembly
**
*Instance, name=M1-1, part=M1
*Node
      1,         250.,          80.,         125.
      2,         250.,           0.,         125.
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*Element, type=C3D8R
  1,  68, 313, 553, 169,   1,  13, 145,  28
  2, 313, 314, 554, 553,  13,  14, 146, 145
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*Nset, nset=Set-1, generate
   1,  840,    1
*Elset, elset=Set-1, generate
   1,  546,    1
** Section: Section-1
*Solid Section, elset=Set-1, material=Material-1
,
*End Instance
**
*Instance, name=M1-2, part=M1
*Node
      1,         250.,          80.,         125.
      2,         250.,           0.,         125.
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*Element, type=C3D8R
  1,  68, 313, 553, 169,   1,  13, 145,  28
  2, 313, 314, 554, 553,  13,  14, 146, 145
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*Nset, nset=Set-1, generate
   1,  840,    1
*Elset, elset=Set-1, generate
   1,  546,    1
** Section: Section-1
*Solid Section, elset=Set-1, material=Material-1
,
*End Instance
**
*Instance, name=M1-3, part=M1
*Node
      1,         250.,          80.,         125.
      2,         250.,           0.,         125.
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*Element, type=C3D8R
  1,  68, 313, 553, 169,   1,  13, 145,  28
  2, 313, 314, 554, 553,  13,  14, 146, 145
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*Nset, nset=Set-1, generate
   1,  840,    1
*Elset, elset=Set-1, generate
   1,  546,    1
** Section: Section-1
*Solid Section, elset=Set-1, material=Material-1
,
*End Instance
**
*Instance, name=M1-4, part=M1
*Node
      1,         250.,          80.,         125.
      2,         250.,           0.,         125.
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*Element, type=C3D8R
  1,  68, 313, 553, 169,   1,  13, 145,  28
  2, 313, 314, 554, 553,  13,  14, 146, 145
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*Nset, nset=Set-1, generate
   1,  840,    1
*Elset, elset=Set-1, generate
   1,  546,    1
** Section: Section-1
*Solid Section, elset=Set-1, material=Material-1
,
*End Instance
**
*Nset, nset=Set-1, instance=M1-1
   1,   2,   3,   4,   5,   6
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*Elset, elset=Set-1, instance=M1-1
   1,   2,   3,   4,   5,   6
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*Elset, elset=_Surf-1_S6, internal, instance=M1-1, generate
   1,  271,    3
*Surface, type=ELEMENT, name=Surf-1
_Surf-1_S6, S6
*End Assembly
**
** MATERIALS
**
*Material, name=Material-1
*Elastic
 31622.7, 0.3
** ----------------------------------------------------------------
**
** STEP: Step-1
**
*Step, name=Step-1, nlgeom=YES
*Static
0.01, 1., 1e-05, 1.
**
** BOUNDARY CONDITIONS
**
** Name: BC-1 Type: Symmetry/Antisymmetry/Encastre
*Boundary
Set-1, ENCASTRE
**
** LOADS
**
** Name: Load-1   Type: Pressure
*Dsload
Surf-1, P, 8.192e-05
**
** OUTPUT REQUESTS
**
*Restart, write, frequency=0
**
** FIELD OUTPUT: F-Output-1
**
*Output, field, variable=PRESELECT
**
** HISTORY OUTPUT: H-Output-1
**
*Output, history, variable=PRESELECT
*End Step
